# OpenSim document version 10902
Model VHM_inCTposture:
  gravity: 0 -9.80665 0
  BodySet:
    Body ground: mass=0 mass_center=(0 0 0) inertia_xx=0 inertia_yy=0 inertia_zz=0
    Body auxspine: mass=0 mass_center=(0 0 0) inertia_xx=0 inertia_yy=0 inertia_zz=0
      CustomJoint auxspine: parent_body=ground location_in_parent=(0 0 0) location=(0 0 0)
        Coordinate gndpitch: default_value=0 initial_value=0 range=(-3.141593 3.141593) keys=(p_key rightmouse_button)
            clamped=true
        Coordinate gndroll: default_value=0 initial_value=0 range=(-3.141593 3.141593) keys=(r_key rightmouse_button)
            clamped=true
        Coordinate gndyaw: default_value=0 initial_value=0 range=(-3.141593 3.141593) keys=(y_key rightmouse_button)
            clamped=true
        SpatialTransform: axes_held_at_zero=(translation1 translation2 translation3)
          TransformAxis rotation1: axis=(0 0 1) coordinates=gndpitch LinearFunction(coefficients=1 0)
          TransformAxis rotation2: axis=(1 0 0) coordinates=gndroll LinearFunction(coefficients=1 0)
          TransformAxis rotation3: axis=(0 1 0) coordinates=gndyaw LinearFunction(coefficients=1 0)
    Body auxt1_new: mass=0 mass_center=(0 0 0) inertia_xx=0 inertia_yy=0 inertia_zz=0
      WeldJoint auxt1_new: parent_body=auxspine location_in_parent=(0 0 0) orientation_in_parent=(0 0 -0.5520897)
          location=(0 0 0)
    Body T1: mass=0 mass_center=(0 0 0) inertia_xx=0 inertia_yy=0 inertia_zz=0 meshes=T1.vtp
      WeldJoint t1jnt: parent_body=auxt1_new location_in_parent=(0 0 0) location=(0 0 0)
    Body T2T12: mass=0 mass_center=(0 0 0) inertia_xx=0 inertia_yy=0 inertia_zz=0 meshes=T2_to_T12_meter_T1CS_vnf.vtp
      WeldJoint t2t12jnt: parent_body=T1 location_in_parent=(0 0 0) location=(0 0 0)
    Body L1L5: mass=0 mass_center=(0 0 0) inertia_xx=0 inertia_yy=0 inertia_zz=0 meshes=L1_to_L5_meter_T1CS_vnf.vtp
      WeldJoint l1l5jnt: parent_body=T1 location_in_parent=(0 0 0) location=(0 0 0)
    Body Pelvis: mass=0 mass_center=(0 0 0) inertia_xx=0 inertia_yy=0 inertia_zz=0 meshes=Pelvis_meter_T1CS_vnf.vtp
      WeldJoint pelvisjnt: parent_body=T1 location_in_parent=(0 0 0) location=(0 0 0)
    Body auxThorax: mass=0 mass_center=(0 0 0) inertia_xx=0 inertia_yy=0 inertia_zz=0
      WeldJoint auxThoraxjnt: parent_body=T1 location_in_parent=(0.0778201 -0.0194623 0.00461227)
          orientation_in_parent=(-0.007867944 -0.04256509 0.4830094) location=(0 0 0)
    Body ribcage: mass=0 mass_center=(0 0 0) inertia_xx=0 inertia_yy=0 inertia_zz=0 meshes=Ribs_meter_T1CS_vnf.vtp
      WeldJoint ribcagejnt: parent_body=T1 location_in_parent=(0 0 0) location=(0 0 0)
    Body clavicleL: mass=0 mass_center=(0 0 0) inertia_xx=0 inertia_yy=0 inertia_zz=0
        meshes=Left_Clavicle_meter_T1CS_vnf.vtp
      WeldJoint clavicleLjnt: parent_body=T1 location_in_parent=(0 0 0) location=(0 0 0)
    Body clavicleR: mass=0 mass_center=(0 0 0) inertia_xx=0 inertia_yy=0 inertia_zz=0
        meshes=Right_Clavicle_meter_T1CS_vnf.vtp
      WeldJoint clavicleRjnt: parent_body=T1 location_in_parent=(0 0 0) location=(0 0 0)
    Body scapulaL: mass=0 mass_center=(0 0 0) inertia_xx=0 inertia_yy=0 inertia_zz=0
        meshes=Left_Scapula_meter_T1CS_vnf.vtp
      WeldJoint scapulaLjnt: parent_body=clavicleL location_in_parent=(0 0 0) location=(0 0 0)
    Body scapulaR: mass=0 mass_center=(0 0 0) inertia_xx=0 inertia_yy=0 inertia_zz=0
        meshes=Right_Scapula_meter_T1CS_vnf.vtp
      WeldJoint scapulaRjnt: parent_body=clavicleR location_in_parent=(0 0 0) location=(0 0 0)
    Body auxt1: mass=0 mass_center=(0 0 0) inertia_xx=0 inertia_yy=0 inertia_zz=0
      CustomJoint auxt1jnt: parent_body=auxspine location_in_parent=(0 0 0) location=(0 0 0)
        Coordinate pitch: default_value=0 initial_value=0 range=(-0.8726646 1.256637) clamped=true
        Coordinate roll: default_value=0 initial_value=0 range=(-0.6981317 0.6981317) clamped=true
        Coordinate yaw: default_value=0 initial_value=0 range=(-1.308997 1.308997) clamped=true
        SpatialTransform: axes_held_at_zero=(translation1 translation2 translation3)
          TransformAxis rotation1: axis=(0 0 1) coordinates=pitch
            NaturalCubicSpline: x=(-1.745329 1.745329) y=(-0.1151917 0.1151917)
          TransformAxis rotation2: axis=(1 0 0) coordinates=roll
            NaturalCubicSpline: x=(-1.745329 1.745329) y=(-0.1151917 0.1151917)
          TransformAxis rotation3: axis=(0 1 0) coordinates=yaw
            NaturalCubicSpline: x=(-1.745329 1.745329) y=(-0.04537856 0.04537856)
    Body cerv7: mass=0 mass_center=(0 0 0) inertia_xx=0 inertia_yy=0 inertia_zz=0 meshes=C7.vtp
      WeldJoint cerv7jnt: parent_body=auxt1 location_in_parent=(0.0048 0.0114 0) orientation_in_parent=(0 0 -0.5302822)
          location=(0 0 0)
    Body aux7: mass=0 mass_center=(0 0 0) inertia_xx=0 inertia_yy=0 inertia_zz=0
      CustomJoint aux7jnt: parent_body=cerv7 location_in_parent=(-0.0011 0.007 0) location=(0 0 0)
        Coordinate aux7jnt_r3: default_value=0 initial_value=0 range=(-99999.9 99999.9) clamped=false
        Coordinate aux7jnt_r1: default_value=0 initial_value=0 range=(-99999.9 99999.9) clamped=false
        Coordinate aux7jnt_r2: default_value=0 initial_value=0 range=(-99999.9 99999.9) clamped=false
        SpatialTransform: axes_held_at_zero=(translation1 translation2 translation3)
          TransformAxis rotation1: axis=(0 0 1) coordinates=aux7jnt_r3
          TransformAxis rotation2: axis=(1 0 0) coordinates=aux7jnt_r1
          TransformAxis rotation3: axis=(0 1 0) coordinates=aux7jnt_r2
    Body cerv6: mass=0 mass_center=(0 0 0) inertia_xx=0 inertia_yy=0 inertia_zz=0 meshes=C6.vtp
      WeldJoint cerv6jnt: parent_body=aux7 location_in_parent=(-0.0033 0.0116 0) orientation_in_parent=(0 0 0.1785451)
          location=(0 0 0)
    Body aux6: mass=0 mass_center=(0 0 0) inertia_xx=0 inertia_yy=0 inertia_zz=0
      CustomJoint aux6jnt: parent_body=cerv6 location_in_parent=(-0.0021 0.0039 0) location=(0 0 0)
        Coordinate aux6jnt_r3: default_value=0 initial_value=0 range=(-99999.9 99999.9) clamped=false
        Coordinate aux6jnt_r1: default_value=0 initial_value=0 range=(-99999.9 99999.9) clamped=false
        Coordinate aux6jnt_r2: default_value=0 initial_value=0 range=(-99999.9 99999.9) clamped=false
        SpatialTransform: axes_held_at_zero=(translation1 translation2 translation3)
          TransformAxis rotation1: axis=(0 0 1) coordinates=aux6jnt_r3
          TransformAxis rotation2: axis=(1 0 0) coordinates=aux6jnt_r1
          TransformAxis rotation3: axis=(0 1 0) coordinates=aux6jnt_r2
    Body cerv5: mass=0 mass_center=(0 0 0) inertia_xx=0 inertia_yy=0 inertia_zz=0 meshes=C5.vtp
      WeldJoint cerv5jnt: parent_body=aux6 location_in_parent=(-0.0013 0.015 0) orientation_in_parent=(0 0 -0.01771498)
          location=(0 0 0)
    Body aux5: mass=0 mass_center=(0 0 0) inertia_xx=0 inertia_yy=0 inertia_zz=0
      CustomJoint aux5jnt: parent_body=cerv5 location_in_parent=(-0.0025 0.0014 0) location=(0 0 0)
        Coordinate aux5jnt_r3: default_value=0 initial_value=0 range=(-99999.9 99999.9) clamped=false
        Coordinate aux5jnt_r1: default_value=0 initial_value=0 range=(-99999.9 99999.9) clamped=false
        Coordinate aux5jnt_r2: default_value=0 initial_value=0 range=(-99999.9 99999.9) clamped=false
        SpatialTransform: axes_held_at_zero=(translation1 translation2 translation3)
          TransformAxis rotation1: axis=(0 0 1) coordinates=aux5jnt_r3
          TransformAxis rotation2: axis=(1 0 0) coordinates=aux5jnt_r1
          TransformAxis rotation3: axis=(0 1 0) coordinates=aux5jnt_r2
    Body cerv4: mass=0 mass_center=(0 0 0) inertia_xx=0 inertia_yy=0 inertia_zz=0 meshes=C4.vtp
      WeldJoint cerv4jnt: parent_body=aux5 location_in_parent=(-0.0014 0.0172 0)
          orientation_in_parent=(0 0 -0.01803122) location=(0 0 0)
    Body aux4: mass=0 mass_center=(0 0 0) inertia_xx=0 inertia_yy=0 inertia_zz=0
      CustomJoint aux4jnt: parent_body=cerv4 location_in_parent=(-0.0034 0.0003 0) location=(0 0 0)
        Coordinate aux4jnt_r3: default_value=0 initial_value=0 range=(-99999.9 99999.9) clamped=false
        Coordinate aux4jnt_r1: default_value=0 initial_value=0 range=(-99999.9 99999.9) clamped=false
        Coordinate aux4jnt_r2: default_value=0 initial_value=0 range=(-99999.9 99999.9) clamped=false
        SpatialTransform: axes_held_at_zero=(translation1 translation2 translation3)
          TransformAxis rotation1: axis=(0 0 1) coordinates=aux4jnt_r3
          TransformAxis rotation2: axis=(1 0 0) coordinates=aux4jnt_r1
          TransformAxis rotation3: axis=(0 1 0) coordinates=aux4jnt_r2
    Body cerv3: mass=0 mass_center=(0 0 0) inertia_xx=0 inertia_yy=0 inertia_zz=0 meshes=C3.vtp
      WeldJoint cerv3jnt: parent_body=aux4 location_in_parent=(-0.0008 0.0175 0) orientation_in_parent=(0 0 0.07619455)
          location=(0 0 0)
    Body aux3: mass=0 mass_center=(0 0 0) inertia_xx=0 inertia_yy=0 inertia_zz=0
      CustomJoint aux3jnt: parent_body=cerv3 location_in_parent=(-0.0042 -0.0024 0) location=(0 0 0)
        Coordinate aux3jnt_r3: default_value=0 initial_value=0 range=(-99999.9 99999.9) clamped=false
        Coordinate aux3jnt_r1: default_value=0 initial_value=0 range=(-99999.9 99999.9) clamped=false
        Coordinate aux3jnt_r2: default_value=0 initial_value=0 range=(-99999.9 99999.9) clamped=false
        SpatialTransform: axes_held_at_zero=(translation1 translation2 translation3)
          TransformAxis rotation1: axis=(0 0 1) coordinates=aux3jnt_r3
          TransformAxis rotation2: axis=(1 0 0) coordinates=aux3jnt_r1
          TransformAxis rotation3: axis=(0 1 0) coordinates=aux3jnt_r2
    Body cerv2: mass=0 mass_center=(0 0 0) inertia_xx=0 inertia_yy=0 inertia_zz=0 meshes=C2.vtp
      WeldJoint cerv2jnt: parent_body=aux3 location_in_parent=(-0.0001 0.0229 0) orientation_in_parent=(0 0 0.01786156)
          location=(0 0 0)
    Body aux2: mass=0 mass_center=(0 0 0) inertia_xx=0 inertia_yy=0 inertia_zz=0
      CustomJoint aux2jnt: parent_body=cerv2 location_in_parent=(0.0014 0.0211 0) location=(0 0 0)
        Coordinate aux2jnt_r3: default_value=0 initial_value=0 range=(-99999.9 99999.9) clamped=false
        Coordinate aux2jnt_r1: default_value=0 initial_value=0 range=(-99999.9 99999.9) clamped=false
        Coordinate aux2jnt_r2: default_value=0 initial_value=0 range=(-99999.9 99999.9) clamped=false
        SpatialTransform: axes_held_at_zero=(translation1 translation2 translation3)
          TransformAxis rotation1: axis=(0 0 1) coordinates=aux2jnt_r3
          TransformAxis rotation2: axis=(1 0 0) coordinates=aux2jnt_r1
          TransformAxis rotation3: axis=(0 1 0) coordinates=aux2jnt_r2
    Body cerv1: mass=0 mass_center=(0 0 0) inertia_xx=0 inertia_yy=0 inertia_zz=0 meshes=C1.vtp
      WeldJoint cerv1jnt: parent_body=aux2 location_in_parent=(-0.0117 -0.0062 0) orientation_in_parent=(0 0 0.432036)
          location=(0 0 0)
    Body aux1: mass=0 mass_center=(0 0 0) inertia_xx=0 inertia_yy=0 inertia_zz=0
      CustomJoint aux1jnt: parent_body=cerv1 location_in_parent=(0 0.0277 0) location=(0 0 0)
        Coordinate aux1jnt_r3: default_value=0 initial_value=0 range=(-99999.9 99999.9) clamped=false
        Coordinate aux1jnt_r1: default_value=0 initial_value=0 range=(-99999.9 99999.9) clamped=false
        Coordinate aux1jnt_r2: default_value=0 initial_value=0 range=(-99999.9 99999.9) clamped=false
        SpatialTransform: axes_held_at_zero=(translation1 translation2 translation3)
          TransformAxis rotation1: axis=(0 0 1) coordinates=aux1jnt_r3
          TransformAxis rotation2: axis=(1 0 0) coordinates=aux1jnt_r1
          TransformAxis rotation3: axis=(0 1 0) coordinates=aux1jnt_r2
    Body skull: mass=0 mass_center=(0 0 0) inertia_xx=0 inertia_yy=0 inertia_zz=0 meshes=Skull_meter_LocalCS_vnf.vtp
      WeldJoint skulljnt: parent_body=aux1 location_in_parent=(0.0016 -0.0108 0) orientation_in_parent=(0 0 -0.113546)
          location=(0 0 0)
    Body jaw: mass=0 mass_center=(0 0 0) inertia_xx=0 inertia_yy=0 inertia_zz=0 meshes=Mandible_meter_LocalCS_vnf.vtp
      WeldJoint jawjnt: parent_body=aux1 location_in_parent=(0.0016 -0.0108 0) orientation_in_parent=(0 0 -0.113546)
          location=(0 0 0)
    Body hyoid_bone: mass=0 mass_center=(0 0 0) inertia_xx=0 inertia_yy=0 inertia_zz=0
        meshes=Hyoid_meter_LocalCS_vnf.vtp
      CustomJoint hyoid_bone: parent_body=cerv3 location_in_parent=(0 0 0) location=(0 0 0)
        Coordinate hyoid_bone_r3: default_value=0.1224169 initial_value=0.1224169 range=(-99999.9 99999.9)
            clamped=false
        Coordinate hyoid_bone_tx: default_value=0.041786 initial_value=0.041786 range=(-99999.9 99999.9) clamped=false
        Coordinate hyoid_bone_ty: default_value=-0.0131898 initial_value=-0.0131898 range=(-99999.9 99999.9)
            clamped=false
        SpatialTransform: axes_held_at_zero=(rotation2 rotation3 translation3)
          TransformAxis rotation1: axis=(0 0 1) coordinates=hyoid_bone_r3
          TransformAxis translation1: axis=(1 0 0) coordinates=hyoid_bone_tx
          TransformAxis translation2: axis=(0 1 0) coordinates=hyoid_bone_ty
  ConstraintSet:
    CoordinateCouplerConstraint aux7jnt_r1_con: dependent_coordinate_name=aux7jnt_r1 independent_coordinate_names=roll
      coupled_coordinates_function f61:
        NaturalCubicSpline: x=(-1.745329 1.745329) y=(-0.2007129 0.2007129)
    CoordinateCouplerConstraint aux7jnt_r2_con: dependent_coordinate_name=aux7jnt_r2 independent_coordinate_names=yaw
      coupled_coordinates_function f62:
        NaturalCubicSpline: x=(-1.745329 1.745329) y=(-0.1361357 0.1361357)
    CoordinateCouplerConstraint aux7jnt_r3_con: dependent_coordinate_name=aux7jnt_r3 independent_coordinate_names=pitch
      coupled_coordinates_function f63:
        NaturalCubicSpline: x=(-1.745329 1.745329) y=(-0.2181662 0.2181662)
    CoordinateCouplerConstraint aux6jnt_r1_con: dependent_coordinate_name=aux6jnt_r1 independent_coordinate_names=roll
      coupled_coordinates_function f51:
        NaturalCubicSpline: x=(-1.745329 1.745329) y=(-0.2286381 0.2286381)
    CoordinateCouplerConstraint aux6jnt_r2_con: dependent_coordinate_name=aux6jnt_r2 independent_coordinate_names=yaw
      coupled_coordinates_function f52:
        NaturalCubicSpline: x=(-1.745329 1.745329) y=(-0.158825 0.158825)
    CoordinateCouplerConstraint aux6jnt_r3_con: dependent_coordinate_name=aux6jnt_r3 independent_coordinate_names=pitch
      coupled_coordinates_function f53:
        NaturalCubicSpline: x=(-1.745329 1.745329) y=(-0.2565634 0.2565634)
    CoordinateCouplerConstraint aux5jnt_r1_con: dependent_coordinate_name=aux5jnt_r1 independent_coordinate_names=roll
      coupled_coordinates_function f41:
        NaturalCubicSpline: x=(-1.745329 1.745329) y=(-0.3141593 0.3141593)
    CoordinateCouplerConstraint aux5jnt_r2_con: dependent_coordinate_name=aux5jnt_r2 independent_coordinate_names=yaw
      coupled_coordinates_function f42:
        NaturalCubicSpline: x=(-1.745329 1.745329) y=(-0.158825 0.158825)
    CoordinateCouplerConstraint aux5jnt_r3_con: dependent_coordinate_name=aux5jnt_r3 independent_coordinate_names=pitch
      coupled_coordinates_function f43:
        NaturalCubicSpline: x=(-1.745329 1.745329) y=(-0.2565634 0.2565634)
    CoordinateCouplerConstraint aux4jnt_r1_con: dependent_coordinate_name=aux4jnt_r1 independent_coordinate_names=roll
      coupled_coordinates_function f31:
        NaturalCubicSpline: x=(-1.745329 1.745329) y=(-0.3141593 0.3141593)
    CoordinateCouplerConstraint aux4jnt_r2_con: dependent_coordinate_name=aux4jnt_r2 independent_coordinate_names=yaw
      coupled_coordinates_function f32:
        NaturalCubicSpline: x=(-1.745329 1.745329) y=(-0.158825 0.158825)
    CoordinateCouplerConstraint aux4jnt_r3_con: dependent_coordinate_name=aux4jnt_r3 independent_coordinate_names=pitch
      coupled_coordinates_function f33:
        NaturalCubicSpline: x=(-1.745329 1.745329) y=(-0.1919862 0.1919862)
    CoordinateCouplerConstraint aux3jnt_r1_con: dependent_coordinate_name=aux3jnt_r1 independent_coordinate_names=roll
      coupled_coordinates_function f21:
        NaturalCubicSpline: x=(-1.745329 1.745329) y=(-0.286234 0.286234)
    CoordinateCouplerConstraint aux3jnt_r2_con: dependent_coordinate_name=aux3jnt_r2 independent_coordinate_names=yaw
      coupled_coordinates_function f22:
        NaturalCubicSpline: x=(-1.745329 1.745329) y=(-0.06806784 0.06806784)
    CoordinateCouplerConstraint aux3jnt_r3_con: dependent_coordinate_name=aux3jnt_r3 independent_coordinate_names=pitch
      coupled_coordinates_function f23:
        NaturalCubicSpline: x=(-1.745329 1.745329) y=(-0.1291544 0.1291544)
    CoordinateCouplerConstraint aux2jnt_r1_con: dependent_coordinate_name=aux2jnt_r1 independent_coordinate_names=roll
      coupled_coordinates_function f11:
        NaturalCubicSpline: x=(-1.745329 1.745329) y=(-0.143117 0.143117)
    CoordinateCouplerConstraint aux2jnt_r2_con: dependent_coordinate_name=aux2jnt_r2 independent_coordinate_names=yaw
      coupled_coordinates_function f12:
        NaturalCubicSpline: x=(-1.745329 1.745329) y=(-0.9058259 0.9058259)
    CoordinateCouplerConstraint aux2jnt_r3_con: dependent_coordinate_name=aux2jnt_r3 independent_coordinate_names=pitch
      coupled_coordinates_function f13:
        NaturalCubicSpline: x=(-1.745329 1.745329) y=(-0.2565634 0.2565634)
    CoordinateCouplerConstraint aux1jnt_r1_con: dependent_coordinate_name=aux1jnt_r1 independent_coordinate_names=roll
      coupled_coordinates_function f1:
        NaturalCubicSpline: x=(-1.745329 1.745329) y=(-0.143117 0.143117)
    CoordinateCouplerConstraint aux1jnt_r2_con: dependent_coordinate_name=aux1jnt_r2 independent_coordinate_names=yaw
      coupled_coordinates_function f2:
        NaturalCubicSpline: x=(-1.745329 1.745329) y=(-0.1134464 0.1134464)
    CoordinateCouplerConstraint aux1jnt_r3_con: dependent_coordinate_name=aux1jnt_r3 independent_coordinate_names=pitch
      coupled_coordinates_function f3:
        NaturalCubicSpline: x=(-1.745329 1.745329) y=(-0.3211406 0.3211406)
    CoordinateCouplerConstraint hyoid_bone_r3_con: dependent_coordinate_name=hyoid_bone_r3
        independent_coordinate_names=pitch
      coupled_coordinates_function f93:
        NaturalCubicSpline: x=(-1.745329 1.745329) y=(0.1431775 0.1016562)
    CoordinateCouplerConstraint hyoid_bone_tx_con: dependent_coordinate_name=hyoid_bone_tx
        independent_coordinate_names=pitch
      coupled_coordinates_function f91:
        NaturalCubicSpline: x=(-1.745329 1.745329) y=(0.023177 0.060395)
    CoordinateCouplerConstraint hyoid_bone_ty_con: dependent_coordinate_name=hyoid_bone_ty
        independent_coordinate_names=pitch
      coupled_coordinates_function f92:
        NaturalCubicSpline: x=(-1.745329 1.745329) y=(-0.02177518 -0.004604417)
